(x - a)^2 + b^2 == 0
(x - a)^2 == -b^2
x - a == sqrt(-b^2) == sqrt(-1)*b
-x + a == sqrt(-b^2) == sqrt(-1)*b
x == a + b*sqrt(-1)
x == a - b*sqrt(-1)
a := 13 - 5i
b := 4 + 7i
a + b → 17 + 2i
a - b → 9 - 12i
a*b → 87 + 71i
(13*4 - (-5)*7) → 87
(-5*4 + 13*7) → 71
(ac - bd) + (bc + ad)*i
z := 5 + 13i
z' := 5 - 13i
z + z' → 10
z*z' == 5^2 + 13^2 → 1
b*x == a  # Домножим обе части на сопряженное b'
b' := 4 - 7i
b*b'*x == a*b'
|b|^2*x == a*b'  # Домножим на 1/|b|^2
x == 1/|b|^2*a*b'
a/b == 1/|b|^2*a*b' == 1/(b*b')*(a*b') == 1/(4^2 + 7^2)*(a*b') → 1
a/b float → 0.261538461538 - 1.70769230769i
(0.261538461538 - 1.70769230769i)*b → 13 - 5i
